# Завдання 1
x := 2
y := x^2 + 1
x*y = 10
x = 2
y = 5
f(x, y) := x^2*(cos(x + y) - sin(x + y))
f(x, y) = 0.387663
f(1, 2) = -1.13111
x := 1.5
y := 2.2
f(x, y) = -0.716094
# Завдання 2
x := 2
y := x^2 + 1
x*y = 10
x/y = 0.4
sqrt(x*y) = 3.16228
nthroot(x, 3)*y^2 = 31.498
(y/x)^3 = 15.625
x^2 + 2*x*y + y^2 = 49
y^x = 25
x := 3
y := 4
x*y = 12
x/y = 0.75
sqrt(x*y) = 3.4641
nthroot(x, 3)*y^2 = 23.076
(y/x)^3 = 2.37037
x^2 + 2*x*y + y^2 = 49
y^x = 64
f(x) := sqrt(x)*sin(x*y)
f(x) = -0.929372
f(2) = 1.39916
f(5) = 2.04141
# Завдання 3
A := [1, 4; 2, 5; 3, 6]
B := [6, 3; 5, 2; 4, 1]
A + B = [7, 7; 7, 7; 7, 7]
A := [1, 3; 7, 2; 8, 11]
B := [4, 8; 6, 1; 0, 5]
A + B = [5, 11; 13, 3; 8, 16]
# Завдання 4
A := [1, 3; 7, 2; 8, 11]
B := [1, 2, 3; 4, 5, 6]
10*A = [10, 30; 70, 20; 80, 110]
0.25*B = [0.25, 0.5, 0.75; 1, 1.25, 1.5]
# Завдання 5
A := [1, 3; 7, 2; 8, 11]
B := [4; 8]
C := [1, 3; 7, 2; 8, 11]
D := [1, 2, 3, 4; 5, 6, 7, 8]
A*B = [28; 44; 120]
C*D = [16, 20, 24, 28; 17, 26, 35, 44; 63, 82, 101, 120]
# Завдання 6
A := [1, 2; 3, 4; 5, 6]
B := [1, 0.5; 3.2, 15; 4, 0.1]
C := [1, 0, 0; 0, 1, 0; 0, 0, 1]
D := [0, 0, 0; 1, 1, 1; 0, 0, 0]
transpose(A) = [1, 3, 5; 2, 4, 6]
transpose(B) = [1, 3.2, 4; 0.5, 15, 0.1]
transpose(C) = [1, 0, 0; 0, 1, 0; 0, 0, 1]
transpose(D) = [0, 1, 0; 0, 1, 0; 0, 1, 0]
# Завдання 7
x := [1; 2; 3; 4; 5; 6; 7; 8]
y := [7; 4; 6; 7; 8; 14; 11; 17]
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y_1(x) := x^3
y_2(x) := x^-2
x_1 := -3, -2.9 .. 3
x_2 := -2, -1.9 .. 2
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f1(r) := sqrt(r)/2
f2(r) := ln(r*10)
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f(x, y) := x^4 + y^3
# [component: inputs f]
