# Завдання 4
Given
d/dx(y(x)) == 2*x + 1
y(0) == 3
x := 0, 1 .. 2
y := Odesolve(x, 2)
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Given
d/dx(y(x)) == y(x) - y(x)^2
y(0) == 0.1
x := 0, 1 .. 10
y := Odesolve(x, 10)
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# Завдання 7
Given
d/dt(x(t)) == -1.2*y(t)
x(0) == 0
y(0) == 2
d/dt(y(t)) == 1.4*x(t) - 0.1*y(t)
[x; y] := Odesolve([x; y], t, 20)
t := 0, 0.5 .. 20
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# Завдання 8
Given
d/dt(x(t)) == -2*y(t)
d/dt(y(t)) == 0.5*x(t)
x(0) == 2
y(0) == 0
[x; y] := Odesolve([x; y], t, 20)
t := 0, 0.5 .. 20
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# Завдання 9
α := 0.079
β := 0.039
γ := 0.099
E := 290
Given
d/dt(W(t)) == α*W(t) - β*S(t)
W(0) == 600
d/dt(S(t)) == γ*(W(t) - S(t) - E)
t := 0, 1 .. 10
S(0) == 520
[W; S] := Odesolve([W; S], t, 10)
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λ1 := ((α - γ) + sqrt((α - γ)^2 - 4*γ*(β - α)))/2
λ1 = 0.0537181
λ2 := ((α - γ) - sqrt((α - γ)^2 - 4*γ*(β - α)))/2
λ2 = -0.0737181
Нестійка
