# Завдання 1
Given
d/dt(y(t)) == k*U(t)
k := 5
y(0) == 10
U(t) := 0
y := Odesolve(t, 10)
t := 0 .. 10
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# За відсутності інвестицій ефективність залишається лінійною
Given
d/dt(y(t)) == k*U(t)
k := 5
y(0) == 10
U(t) := 8
y := Odesolve(t, 10)
t := 0 .. 10
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# За сталих інвестицій ефективність росте в геометричній прогресії
Given
d/dt(y(t)) == k*U(t)
k := 5
y(0) == 10
U(t) := 2 + 0.8*t
y := Odesolve(t, 10)
t := 0 .. 10
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# За зростаючих(хоч і початково менших іввестицій) ефективність росте в геометричній прогресії в швидшому темпі чим за сталих
# Завдання 3.2
# Інвестиції відсутні:
Given
d/dt(y(t)) == k_0*y(t)*(1 - y(t)/y_max) + U(t)
y(0) == 1000
y_max := 20000
k_0 := 0.5
U(t) := 0
y := Odesolve(t, 20)
t := 0 .. 20
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# Висновок: Виробництво повільно росте доки не настане насичення ринку
# Рівень інвестицій постійний і дорівнює 4 тис. од.
Given
d/dt(y(t)) == k_0*y(t)*(1 - y(t)/y_max) + U(t)
y(0) == 1000
k_0 := 0.5
U(t) := 4000
y := Odesolve(t, 20)
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# Висновок: Виробництво росте швидко але оскільки швидко настає насичення ринку більшу частину часу динаміка росту є спадною
# Інвестиції лінійно зростають і описуються функцією
Given
d/dt(y(t)) == k_0*y(t)*(1 - y(t)/y_max) + U(t)
b := 0.2
y(0) == 1000
a := 0.5
U(t) := a + b*t
y := Odesolve(t, 20)
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# Висновок: При зростаючих інвестиціях виробництво повільно росте але прискорюється з часом
# Пропорційні інвестиції
Given
d/dt(y(t)) == k_0*y(t)*(1 - y(t)/y_max) + U(t)
γ := 0.1
U(t) := γ*y(t)
y(0) == 1000
y := Odesolve(t, 19)
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# Висновок: При пропорційних інвестиціях динаміка росту збільшується з ростом виробництва до наближення насичення ринку
# Нелінійні інвестиції
Given
d/dt(y(t)) == k_0*y(t)*(1 - y(t)/y_max) + U(t)
y(0) == 1000
γ(t) := 0.01*t
U(t) := γ(t)*y(t)
y := Odesolve(t, 18)
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# Висновок: повільний ріст з різким прискоренням під кінець
# Завдання 5.1
Given
d/dt(y(t)) == (a + b)*(ymax - y(t))*y(t)
y(0) == 500
a := 0.03/8
t := 0 .. 8
ymax := 35000
b := 0.01/8
y := Odesolve(t, 8)
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